# Лабораторная_работа№1
# выполнил студент 403 группы ФМФ
# Стефанишин Никита
# Оптимальное поведение потребителя. Решение задачи методом множителей Лагранжа.
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N := 8
α := 2
β := 3
γ := 2
U(x1, x2, x3) := α*x1*x2 + β*x1*x3 + γ*x2*x3
L(x1, x2, x3, λ) := U(x1, x2, x3) + λ*(M - x1*p1 - x2*p2 - x3*p3)
Найдем частные производные функции Лагранжа и приравняем их к нулю:
d/dx1(L(x1, x2, x3, λ)) → 2*x2 + 3*x3 - λ*p1
d/dx2(L(x1, x2, x3, λ)) → 2*x1 + 2*x3 - λ*p2
d/dx3(L(x1, x2, x3, λ)) → 3*x1 + 2*x2 - λ*p3
d/dλ(L(x1, x2, x3, λ)) → M - p1*x1 - p2*x2 - p3*x3
x1 := 0
x2 := 0
x3 := 0
λ := 0
Given
d/dx1(L(x1, x2, x3, λ)) == 0
d/dx2(L(x1, x2, x3, λ)) == 0
d/dx3(L(x1, x2, x3, λ)) == 0
d/dλ(L(x1, x2, x3, λ)) == 0
X1 := Find(x1, x2, x3, λ) → [
    -(6*M*p2 - 4*M*p1 + 4*M*p3)/(4*p1^2 - 12*p1*p2 - 8*p1*p3 + 9*p2^2 - 12*p2*p3 + 4*p3^2);
    -(6*M*p1 - 9*M*p2 + 6*M*p3)/(4*p1^2 - 12*p1*p2 - 8*p1*p3 + 9*p2^2 - 12*p2*p3 + 4*p3^2);
    -(4*M*p1 + 6*M*p2 - 4*M*p3)/(4*p1^2 - 12*p1*p2 - 8*p1*p3 + 9*p2^2 - 12*p2*p3 + 4*p3^2);
    -24*M/(4*p1^2 - 12*p1*p2 - 8*p1*p3 + 9*p2^2 - 12*p2*p3 + 4*p3^2)
]
XX1 := X1[0]
XX1 → -(6*M*p2 - 4*M*p1 + 4*M*p3)/(4*p1^2 - 12*p1*p2 - 8*p1*p3 + 9*p2^2 - 12*p2*p3 + 4*p3^2)
XX2 := X1[1]
XX2 → -(6*M*p1 - 9*M*p2 + 6*M*p3)/(4*p1^2 - 12*p1*p2 - 8*p1*p3 + 9*p2^2 - 12*p2*p3 + 4*p3^2)
XX3 := X1[2]
XX3 → -(4*M*p1 + 6*M*p2 - 4*M*p3)/(4*p1^2 - 12*p1*p2 - 8*p1*p3 + 9*p2^2 - 12*p2*p3 + 4*p3^2)
Lamda := X1[3]
Lamda → -24*M/(4*p1^2 - 12*p1*p2 - 8*p1*p3 + 9*p2^2 - 12*p2*p3 + 4*p3^2)
Функции спроса потребителя
[XX1; XX2; XX3] → [
    -(6*M*p2 - 4*M*p1 + 4*M*p3)/(4*p1^2 - 12*p1*p2 - 8*p1*p3 + 9*p2^2 - 12*p2*p3 + 4*p3^2);
    -(6*M*p1 - 9*M*p2 + 6*M*p3)/(4*p1^2 - 12*p1*p2 - 8*p1*p3 + 9*p2^2 - 12*p2*p3 + 4*p3^2);
    -(4*M*p1 + 6*M*p2 - 4*M*p3)/(4*p1^2 - 12*p1*p2 - 8*p1*p3 + 9*p2^2 - 12*p2*p3 + 4*p3^2)
]
p1 := 130 + N = 138
p2 := 180 + N = 188
p3 := 210 + N = 218
M := 6000 + 40*N = 6320
XX1 → -(6*M*p2 - 4*M*p1 + 4*M*p3)/(4*p1^2 - 12*p1*p2 - 8*p1*p3 + 9*p2^2 - 12*p2*p3 + 4*p3^2) = 19.9185
XX2 → -(6*M*p1 - 9*M*p2 + 6*M*p3)/(4*p1^2 - 12*p1*p2 - 8*p1*p3 + 9*p2^2 - 12*p2*p3 + 4*p3^2) = 6.10761
XX3 → -(4*M*p1 + 6*M*p2 - 4*M*p3)/(4*p1^2 - 12*p1*p2 - 8*p1*p3 + 9*p2^2 - 12*p2*p3 + 4*p3^2) = 11.1147
Lamda → -24*M/(4*p1^2 - 12*p1*p2 - 8*p1*p3 + 9*p2^2 - 12*p2*p3 + 4*p3^2) = 0.330141
D := transpose([XX1, XX2, XX3])
Если речь идет о неделимых благах,
# то оптимальный план потребителя составит
D → [
    -(6*M*p2 - 4*M*p1 + 4*M*p3)/(4*p1^2 - 12*p1*p2 - 8*p1*p3 + 9*p2^2 - 12*p2*p3 + 4*p3^2);
    -(6*M*p1 - 9*M*p2 + 6*M*p3)/(4*p1^2 - 12*p1*p2 - 8*p1*p3 + 9*p2^2 - 12*p2*p3 + 4*p3^2);
    -(4*M*p1 + 6*M*p2 - 4*M*p3)/(4*p1^2 - 12*p1*p2 - 8*p1*p3 + 9*p2^2 - 12*p2*p3 + 4*p3^2)
] = [19.9185; 6.10761; 11.1147]
ему необходимо приобрести:
a := D[0]
b := D[1]
c := D[2]
1-го блага
a → -(6*M*p2 - 4*M*p1 + 4*M*p3)/(4*p1^2 - 12*p1*p2 - 8*p1*p3 + 9*p2^2 - 12*p2*p3 + 4*p3^2) = 19.9185
2-го блага
b → -(6*M*p1 - 9*M*p2 + 6*M*p3)/(4*p1^2 - 12*p1*p2 - 8*p1*p3 + 9*p2^2 - 12*p2*p3 + 4*p3^2) = 6.10761
3-го блага
c → -(4*M*p1 + 6*M*p2 - 4*M*p3)/(4*p1^2 - 12*p1*p2 - 8*p1*p3 + 9*p2^2 - 12*p2*p3 + 4*p3^2) = 11.1147
U_max(a, b, c) := α*a*b + β*a*c + γ*b*c
Максимальная полезность этого набора составляет
U_max(a, b, c) simplify → -12*M^2/(4*p1^2 - 12*p1*p2 - 8*p1*p3 + 9*p2^2 - 12*p2*p3 + 4*p3^2) = 1043.25
Каждый дополнительно использованный доллар вносит вклад в полезность
Lamda → -24*M/(4*p1^2 - 12*p1*p2 - 8*p1*p3 + 9*p2^2 - 12*p2*p3 + 4*p3^2) = 0.330141
Вычислим предельные полезности
На 1 дополнительную единицу 1-го блага приходится
(d/da(U(a, b, c))) simplify → -24*M*p1/(4*p1^2 - 12*p1*p2 - 8*p1*p3 + 9*p2^2 - 12*p2*p3 + 4*p3^2) = 45.5595
дополнительных единиц полезности
На 1 дополнительную единицу 2-го блага приходится
(d/db(U(a, b, c))) simplify → -24*M*p2/(4*p1^2 - 12*p1*p2 - 8*p1*p3 + 9*p2^2 - 12*p2*p3 + 4*p3^2) = 62.0665
дополнительных единиц полезности
На 1 дополнительную единицу 3-го блага приходится
(d/dc(U(a, b, c))) simplify → -24*M*p3/(4*p1^2 - 12*p1*p2 - 8*p1*p3 + 9*p2^2 - 12*p2*p3 + 4*p3^2) = 71.9707
дополнительных единиц полезности
Вычислим нормы замещения благ
Норма замены 2-го блага 1-м:
Для замещения 1 единицы 2-го блага необходимо дополнительно приобрести
n12 := -(d/db(U_max(a, b, c))/d/da(U_max(a, b, c))) simplify → -p2/p1 = -1.36232
единиц 1-го блага, чтобы удовлетворенность осталась той же
Норма замены 1-го блага 2-м:
Для замещения 1 единицы 1-го блага необходимо дополнительно приобрести
n21 := -(d/da(U_max(a, b, c))/d/db(U_max(a, b, c))) simplify → -p1/p2 = -0.734043
единиц 2-го блага, чтобы удовлетворенность осталась на прежнем уровне
Норма замены 3-го блага 1-м:
Для замещения 1 единицы 3-го блага необходимо дополнительно приобрести
n13 := -(d/da(U_max(a, b, c))/d/dc(U_max(a, b, c))) simplify → -p1/p3 = -0.633028
единиц 1-го блага, чтобы удовлетворенность осталась на прежнем уровне
Норма замены 1-го блага 3-м:
Для замещения 1 единицы 1-го блага необходимо дополнительно приобрести
n31 := -(d/dc(U_max(a, b, c))/d/da(U_max(a, b, c))) simplify → -p3/p1 = -1.57971
единиц 3-го блага, чтобы удовлетворенность осталась на прежнем уровне
Норма замены 3-го блага 2-м:
Для замещения 1 единицы 3-го блага необходимо дополнительно приобрести
n23 := -(d/dc(U_max(a, b, c))/d/db(U_max(a, b, c))) simplify → -p3/p2 = -1.15957
единиц 2-го блага, чтобы удовлетворенность осталась на прежнем уровне
Норма замены 2-го блага 3-м:
Для замещения 1 единицы 2-го блага необходимо дополнительно приобрести
n32 := -(d/db(U_max(a, b, c))/d/dc(U_max(a, b, c))) simplify → -p2/p3 = -0.862385
единиц 3-го блага, чтобы удовлетворенность осталась на прежнем уровне
Реакции потребителя при изменении дохода М:
d/dM(XX1) simplify → -2*(3*p2 - 2*p1 + 2*p3)/(4*p1^2 - 12*p1*p2 - 8*p1*p3 + 9*p2^2 - 12*p2*p3 + 4*p3^2) = 0.00315166
d/dM(XX2) simplify → -3*(2*p1 - 3*p2 + 2*p3)/(4*p1^2 - 12*p1*p2 - 8*p1*p3 + 9*p2^2 - 12*p2*p3 + 4*p3^2) = 0.000966394
d/dM(XX3) simplify → -2*(2*p1 + 3*p2 - 2*p3)/(4*p1^2 - 12*p1*p2 - 8*p1*p3 + 9*p2^2 - 12*p2*p3 + 4*p3^2) = 0.00175866
Реакции потребителя при изменении цены на 1-е благо:
d/dp1(XX1) simplify → -4*M*(9*p2^2 + 36*p2*p3 - 1656*p2 + 4*p3^2 - 1104*p3 + 76176)/(12*p2*p3 - 9*p2^2 + 1656*p2 - 4*p3^2 + 1104*p3 - 76176)^2 = -0.180576
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d/dp1(XX2) simplify → 18*M*(3*p2^2 + 4*p2*p3 - 552*p2 - 4*p3^2 + 368*p3 + 25392)/(12*p2*p3 - 9*p2^2 + 1656*p2 - 4*p3^2 + 1104*p3 - 76176)^2 = 0.044037
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d/dp1(XX3) simplify → 4*M*(12*p2*p3 - 27*p2^2 + 1656*p2 + 4*p3^2 - 1104*p3 + 76176)/(12*p2*p3 - 9*p2^2 + 1656*p2 - 4*p3^2 + 1104*p3 - 76176)^2 = -0.0150364
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Реакции потребителя при изменении цены на 2-е благо:
d/dp2(XX1) simplify → 3*M*(p1^2 + 2*p1*p3 - 564*p1 - 3*p3^2 + 564*p3 + 79524)/(2*(2*p1*p3 - p1^2 + 564*p1 - p3^2 + 564*p3 - 79524)^2) = 0.044037
d/dp2(XX2) simplify → -9*M*(p1^2 + 6*p1*p3 - 564*p1 + p3^2 - 564*p3 + 79524)/(4*(2*p1*p3 - p1^2 + 564*p1 - p3^2 + 564*p3 - 79524)^2) = -0.135608
d/dp2(XX3) simplify → 3*M*(2*p1*p3 - 3*p1^2 + 564*p1 + p3^2 - 564*p3 + 79524)/(2*(2*p1*p3 - p1^2 + 564*p1 - p3^2 + 564*p3 - 79524)^2) = 0.0610528
Реакции потребителя при изменении цены на 3-е благо:
d/dp3(XX1) simplify → 4*M*(4*p1^2 + 12*p1*p2 - 1744*p1 - 27*p2^2 + 2616*p2 + 190096)/(12*p1*p2 - 4*p1^2 + 1744*p1 - 9*p2^2 + 2616*p2 - 190096)^2 = -0.0150364
d/dp3(XX2) simplify → 6*M*(12*p1*p2 - 12*p1^2 + 1744*p1 + 9*p2^2 - 2616*p2 + 190096)/(12*p1*p2 - 4*p1^2 + 1744*p1 - 9*p2^2 + 2616*p2 - 190096)^2 = 0.0610528
d/dp3(XX3) simplify → -4*M*(4*p1^2 + 36*p1*p2 - 1744*p1 + 9*p2^2 - 2616*p2 + 190096)/(12*p1*p2 - 4*p1^2 + 1744*p1 - 9*p2^2 + 2616*p2 - 190096)^2 = -0.0941177
Вычислим коэффициенты эластичности по доходу и ценам при заданных ценах и доходе
Для блага 1:
При увеличении дохода на 1 % спрос на 1-е благо возрастает на
E_1_M := d/dM(XX1)/(a/M) simplify → 6320/M = 1
E_11_p := d/dp1(XX1)/(a/p1) simplify → 276*M*(9*p2^2 + 36*p2*p3 - 1656*p2 + 4*p3^2 - 1104*p3 + 76176)*(4*p1^2 - 12*p1*p2 - 8*p1*p3 + 9*p2^2 - 12*p2*p3 + 4*p3^2)/((3*M*p2 - 2*M*p1 + 2*M*p3)*(12*p2*p3 - 9*p2^2 + 1656*p2 - 4*p3^2 + 1104*p3 - 76176)^2) = -1.25107
E_12_p := d/dp1(XX2)/(a/p2) simplify → -1692*M*(3*p2^2 + 4*p2*p3 - 552*p2 - 4*p3^2 + 368*p3 + 25392)*(4*p1^2 - 12*p1*p2 - 8*p1*p3 + 9*p2^2 - 12*p2*p3 + 4*p3^2)/((3*M*p2 - 2*M*p1 + 2*M*p3)*(12*p2*p3 - 9*p2^2 + 1656*p2 - 4*p3^2 + 1104*p3 - 76176)^2) = 0.415641
E_13_p := d/dp1(XX3)/(a/p3) simplify → -436*M*(12*p2*p3 - 27*p2^2 + 1656*p2 + 4*p3^2 - 1104*p3 + 76176)*(4*p1^2 - 12*p1*p2 - 8*p1*p3 + 9*p2^2 - 12*p2*p3 + 4*p3^2)/((3*M*p2 - 2*M*p1 + 2*M*p3)*(12*p2*p3 - 9*p2^2 + 1656*p2 - 4*p3^2 + 1104*p3 - 76176)^2) = -0.164567
Проверка
E_1_M + E_11_p + E_12_p + E_13_p = 5.55112e-17
Для блага 2:
При увеличении дохода на 1 % спрос на 2-е благо возрастает на
E_2_M := d/dM(XX2)/(b/M) simplify → 6320/M = 1
E_21_p := d/dp2(XX1)/(b/p1) simplify → -69*M*(p1^2 + 2*p1*p3 - 564*p1 - 3*p3^2 + 564*p3 + 79524)*(4*p1^2 - 12*p1*p2 - 8*p1*p3 + 9*p2^2 - 12*p2*p3 + 4*p3^2)/((2*M*p1 - 3*M*p2 + 2*M*p3)*(2*p1*p3 - p1^2 + 564*p1 - p3^2 + 564*p3 - 79524)^2) = 0.995006
E_22_p := d/dp2(XX2)/(b/p2) simplify → 141*M*(p1^2 + 6*p1*p3 - 564*p1 + p3^2 - 564*p3 + 79524)*(4*p1^2 - 12*p1*p2 - 8*p1*p3 + 9*p2^2 - 12*p2*p3 + 4*p3^2)/((2*M*p1 - 3*M*p2 + 2*M*p3)*(2*p1*p3 - p1^2 + 564*p1 - p3^2 + 564*p3 - 79524)^2) = -4.17417
E_23_p := d/dp2(XX3)/(b/p3) simplify → -109*M*(2*p1*p3 - 3*p1^2 + 564*p1 + p3^2 - 564*p3 + 79524)*(4*p1^2 - 12*p1*p2 - 8*p1*p3 + 9*p2^2 - 12*p2*p3 + 4*p3^2)/((2*M*p1 - 3*M*p2 + 2*M*p3)*(2*p1*p3 - p1^2 + 564*p1 - p3^2 + 564*p3 - 79524)^2) = 2.17917
Проверка
E_2_M + E_21_p + E_22_p + E_23_p = 0
Для блага 3:
При увеличении дохода на 1 % спрос на 3-е благо возрастает на
E_3_M := d/dM(XX3)/(c/M) simplify → 6320/M = 1
E_31_p := d/dp3(XX1)/(c/p1) simplify → -276*M*(4*p1^2 + 12*p1*p2 - 1744*p1 - 27*p2^2 + 2616*p2 + 190096)*(4*p1^2 - 12*p1*p2 - 8*p1*p3 + 9*p2^2 - 12*p2*p3 + 4*p3^2)/((2*M*p1 + 3*M*p2 - 2*M*p3)*(12*p1*p2 - 4*p1^2 + 1744*p1 - 9*p2^2 + 2616*p2 - 190096)^2) = -0.186691
E_32_p := d/dp3(XX2)/(c/p2) simplify → -564*M*(12*p1*p2 - 12*p1^2 + 1744*p1 + 9*p2^2 - 2616*p2 + 190096)*(4*p1^2 - 12*p1*p2 - 8*p1*p3 + 9*p2^2 - 12*p2*p3 + 4*p3^2)/((2*M*p1 + 3*M*p2 - 2*M*p3)*(12*p1*p2 - 4*p1^2 + 1744*p1 - 9*p2^2 + 2616*p2 - 190096)^2) = 1.03268
E_33_p := d/dp3(XX3)/(c/p3) simplify → 436*M*(4*p1^2 + 36*p1*p2 - 1744*p1 + 9*p2^2 - 2616*p2 + 190096)*(4*p1^2 - 12*p1*p2 - 8*p1*p3 + 9*p2^2 - 12*p2*p3 + 4*p3^2)/((2*M*p1 + 3*M*p2 - 2*M*p3)*(12*p1*p2 - 4*p1^2 + 1744*p1 - 9*p2^2 + 2616*p2 - 190096)^2) = -1.84598
Проверка
E_3_M + E_31_p + E_32_p + E_33_p = 2.22045e-16
