# Лабораторная работа № 2
#
# Дана производственная функция Кобба-Дугласа: y=Ax_1^(α *) x_2^β
# Найти:
# 1) степень однородности функции;
# 2) функцию издержек;
# 3) предельные производительности ресурсов для заданных значений x_1^0 и x_2^0;
# 4) коэффициенты эластичности выпуска по ресурсам и эластичности от расширения
# масштаба производство;
# 5) предельную норму замещения ресурсов для заданных значений x_1^0 и x_2^0;
# 6) оптимальный выбор производителя по критерию максимальной прибыли в условиях совершенной конкуренции
# p = 30 + 2 N; q_1= N; q_2=5 + N;
# 7) функцию спроса на ресурсы и функцию предложения в условиях совершенной конкуренции;
# 8) реакции производителя при изменении цен на продукцию и на ресурсы и соответствующие коэффициенты эластичности при ценах, заданных в пункте 6.
# x_1^0 = 20 + N; x_2^0 = 30 + N
# N=8
# Вариант 8
# y = 4 x_1^(0,3) * x_2^(0,4)
# Решение:
# 1. Определим степень эластичности функции. Сумма коэффициентов эластичности однородной функции равна показателю однородности, т.е.
# E_1+E_2+...+E_n= k
# В нашем случае
# E_1+E_2=k
# Найдем коэффициенты эластичности заданной производственной функции
# y = 4 x_1^(0,3) * x_2^(0,4):
n := 8
y := 4*x1^0.3*x2^0.4  # error: This variable is undefined.
yn := 2.5*z1^0.55*z2^0.3  # error: This variable is undefined.
E1 := d/dx1(y)/(y/x1) → 0.3
h1 := d/dz1(yn)/(yn/z1) → 0.55
E2 := d/dx2(y)/(y/x2) → 0.4
h2 := d/dz2(yn)/(yn/z2) → 0.3
k := E1 + E2 → 0.7
k1 := h1 + h2 → 0.85
# Степень однородности данной производственной функции
k = 0.7
.
# 2. Найдем функцию издержек С(y). Это функция С(у) = min z, где z_1=q_1x_1+q_2x_2, т.е. решим задачу:
